*Heading
** Job name: Job-1C1Ddeformed Model name: Weld-new
** Generated by: Abaqus/CAE 2019
*Preprint, echo=NO, model=NO, history=NO, contact=NO
**
** PARTS
**
*Part, name=weld-new

** STEP: Step-1

*Node
      1, -0.00499999989, -0.00499999989,           0.
      2, -0.00568525214, 0.00529993512,           0.
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*Element, type=C3D8R
  1,   108,  1824, 11805,  1662,     1,    43,  1608,    66
  2,  1824,  1825, 11806, 11805,    43,    44,  1609,  1608
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*Nset, nset=Set-weld, generate
     1,  22496,      1
*Elset, elset=Set-weld, generate
     1,  18080,      1
** Section: Section-1
*Solid Section, elset=Set-weld, material=Material-TC4
,
*End Part
**
**
** ASSEMBLY
**
*Assembly, name=Assembly
**
*Instance, name=weld-new-1, part=weld-new
*End Instance
**
*End Assembly
**
** MATERIALS
**
*Material, name=Material-TC4
*Conductivity
  6.8, 293.
  7.4, 373.
  8.7, 473.
  9.8, 573.
 10.3, 673.
 11.8, 773.
 13.7, 873.
 14.4, 973.
 15.8,1073.
 18.3,1273.
 21.7,1473.
 24.5,1673.
 25.3,1813.
  35.,1923.
  35.,2073.
*Density
4424., 298.
4414., 373.
4402., 473.
4388., 573.
4374., 673.
4360., 773.
4344., 873.
4329., 973.
4315.,1073.
4314.,1273.
4277.,1473.
4238.,1673.
4208.,1813.
4184.,1923.
3986.,2073.
3986.,2373.
*Elastic
 1.09e+11,   0.3,  293.
  9.4e+10,  0.31,  473.
    8e+10, 0.325,  673.
  6.6e+10, 0.342,  873.
  4.8e+10, 0.346,  973.
  3.5e+10,  0.35, 1073.
  2.2e+10, 0.358, 1273.
    5e+09, 0.366, 1473.
    1e+08, 0.374, 1673.
    1e+07,  0.38, 1813.
    1e+07, 0.384, 1923.
    1e+07, 0.384, 2073.
*Expansion
  8.4e-06, 293.
  9.2e-06, 473.
  9.5e-06, 673.
    1e-05, 873.
 1.04e-05, 973.
 1.09e-05,1073.
  1.1e-05,1273.
  1.1e-05,1473.
  1.1e-05,1673.
  1.1e-05,1813.
  1.1e-05,1923.
  1.1e-05,2073.
*Inelastic Heat Fraction
         0.9,
*Plastic, hardening=KINEMATIC
 8.82e+08,   0., 298.
  9.6e+08,   1., 298.
 6.23e+08,   0., 473.
 7.65e+08,   1., 473.
 5.43e+08,   0., 673.
  6.7e+08,   1., 673.
  3.4e+08,   0., 873.
  3.4e+08,   1., 873.
  2.8e+08,   0., 973.
  2.8e+08,   1., 973.
  1.3e+08,   0.,1073.
  1.3e+08,   1.,1073.
    9e+07,   0.,1273.
    9e+07,   1.,1273.
  6.6e+07,   0.,1473.
  6.6e+07,   1.,1473.
  3.1e+07,   0.,1673.
  3.1e+07,   1.,1673.
  1.2e+07,   0.,1813.
  1.2e+07,   1.,1813.
    2e+06,   0.,1923.
    2e+06,   1.,1923.
  100000.,   0.,2073.
  100001.,   1.,2073.
  100000.,   0.,2273.
  100001.,   1.,2273.
*Specific Heat
611., 293.
624., 373.
653., 473.
674., 573.
691., 673.
703., 773.
713., 873.
725., 973.
735.,1073.
754.,1273.
771.,1473.
787.,1673.
800.,1813.
806.,1923.
806.,2073.
