*Heading
** Job name: Job-1-deformed Model name: Weld-new
** Generated by: Abaqus/CAE 2019
*Preprint, echo=NO, model=NO, history=NO, contact=NO
**
** PARTS
**
*Part, name=Part-1
*Node
      1, -0.0055952305, 0.0500001535, 1.53990413e-07
      2, -0.00559543399, 0.0500001535, -0.0101581523
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*Element, type=C3D8T
   1,  166, 1313, 5710,  823,    1,   33,  783,   50
   2, 1313, 1314, 5711, 5710,   33,   34,  784,  783
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*Nset, nset=Set-weld, generate
     1,  12144,      1
*Elset, elset=Set-weld, generate
    1,  9900,     1
** Section: Section-TC4
*Solid Section, elset=Set-weld, material=Material-TC4
,
*End Part
**
**
** ASSEMBLY
**
*Assembly, name=Assembly
**
*Instance, name=Part-1-1, part=Part-1
*End Instance
**
*Nset, nset=Set-11, instance=Part-1-1
    2,    3,    5,    6,    9,   12
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*Elset, elset=Set-11, instance=Part-1-1
 5505, 5510, 5515, 5520, 5525, 5530
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*Elset, elset=_Surf-1_S2, internal, instance=Part-1-1
 5621, 5622, 5623, 5624, 5625, 5626
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*Elset, elset=_Surf-1_S5, internal, instance=Part-1-1
 6075, 6076, 6077, 6078, 6079, 6080
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*Surface, type=ELEMENT, name=Surf-1
_Surf-1_S2, S2
_Surf-1_S5, S5
*End Assembly
**
** MATERIALS
**
*Material, name=Material-TC4
*Conductivity
  6.8, 293.
  7.4, 373.
  8.7, 473.
  9.8, 573.
 10.3, 673.
 11.8, 773.
 13.7, 873.
 14.4, 973.
 15.8,1073.
 18.3,1273.
 21.7,1473.
 24.5,1673.
 25.3,1813.
  35.,1923.
  35.,2073.
*Density
4424., 298.
4414., 373.
4402., 473.
4388., 573.
4374., 673.
4360., 773.
4344., 873.
4329., 973.
4315.,1073.
4314.,1273.
4277.,1473.
4238.,1673.
4208.,1813.
4184.,1923.
3986.,2073.
3986.,2373.
*Elastic
 1.09e+11,   0.3,  293.
  9.4e+10,  0.31,  473.
    8e+10, 0.325,  673.
  6.6e+10, 0.342,  873.
  4.8e+10, 0.346,  973.
  3.5e+10,  0.35, 1073.
  2.2e+10, 0.358, 1273.
    5e+09, 0.366, 1473.
    1e+08, 0.374, 1673.
    1e+07,  0.38, 1813.
    1e+07, 0.384, 1923.
    1e+07, 0.384, 2073.
*Expansion
  8.4e-06, 293.
  9.2e-06, 473.
  9.5e-06, 673.
    1e-05, 873.
 1.04e-05, 973.
 1.09e-05,1073.
  1.1e-05,1273.
  1.1e-05,1473.
  1.1e-05,1673.
  1.1e-05,1813.
  1.1e-05,1923.
  1.1e-05,2073.
*Inelastic Heat Fraction
         0.9,
*Plastic, hardening=KINEMATIC
 8.82e+08,   0., 298.
  9.6e+08,   1., 298.
 6.23e+08,   0., 473.
 7.65e+08,   1., 473.
 5.43e+08,   0., 673.
  6.7e+08,   1., 673.
  3.4e+08,   0., 873.
  3.4e+08,   1., 873.
  2.8e+08,   0., 973.
  2.8e+08,   1., 973.
  1.3e+08,   0.,1073.
  1.3e+08,   1.,1073.
    9e+07,   0.,1273.
    9e+07,   1.,1273.
  6.6e+07,   0.,1473.
  6.6e+07,   1.,1473.
  3.1e+07,   0.,1673.
  3.1e+07,   1.,1673.
  1.2e+07,   0.,1813.
  1.2e+07,   1.,1813.
    2e+06,   0.,1923.
    2e+06,   1.,1923.
  100000.,   0.,2073.
  100001.,   1.,2073.
  100000.,   0.,2273.
  100001.,   1.,2273.
*Specific Heat
611., 293.
624., 373.
653., 473.
674., 573.
691., 673.
703., 773.
713., 873.
725., 973.
735.,1073.
754.,1273.
771.,1473.
787.,1673.
800.,1813.
806.,1923.
806.,2073.
**
** BOUNDARY CONDITIONS
**
** Name: BC-1 Type: Symmetry/Antisymmetry/Encastre
*Boundary
Set-11, ENCASTRE
** ----------------------------------------------------------------
**
** PREDEFINED FIELDS
**
** Name: Predefined weld-1C1D-TEMPERATURE                     Type: TEMPERATURE
*Initial Conditions, type=TEMPERATURE
Part-1-1.1, 572.4368105806101
Part-1-1.2, 572.9361989094467
Part-1-1.3, 558.6668239207272
Part-1-1.4, 558.6563412951995
Part-1-1.5, 570.9449367969003
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Part-1-1.12144, 572.944638171156
** Name: Predefined weld-1C1D-STRAIN                     Type: PLASTIC STRAIN
*Initial Conditions, type=PLASTIC STRAIN
Part-1-1.1, -0.0027386749805805117, -0.00022348154726987515, 0.002972033308851117, 0.003529048388608457, -0.0016355262285626415, 0.0007018213340763485
Part-1-1.2, -0.00030676315571564203, -3.977944890898016e-06, 0.00031106471683081416, 0.0001308819321293293, -0.0003442245978100404, 0.00035623994282668337
Part-1-1.3, -3.102672745198901e-05, 1.6895423489574185e-06, 2.9177985454371878e-05, 2.253518606460584e-05, -0.0001314466176588164, 9.790064249093442e-05
Part-1-1.4, 0.0, 0.0, 0.0, 0.0, 0.0, 0.0
Part-1-1.5, 0.0, 0.0, 0.0, 0.0, 0.0, 0.0
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Part-1-1.9900, 0.030391832739489016, 0.3976998858595415, -0.4281204469011664, 0.01144234868185798, -0.01020601095890057, -0.3033682299198789
** Name: Predefined weld-1C1D-STRESS                     Type: STRESS
*Initial Conditions, type=STRESS
Part-1-1.1, -191763969.42580843, 208536901.80275655, 75586269.11300822, 29860246.683881007, 6584653.6454821, -1239599.0836394285
Part-1-1.2, 46320675.62081068, 252413248.6993218, 160901300.9698268, -27066858.628975827, -5155388.059496155, 30693396.298094567
Part-1-1.3, 143492012.11103567, 228031737.6692403, 160446427.99152088, -91451046.21747676, 10532444.124503596, 17390807.46773618
Part-1-1.4, 66409683.63943425, 158881026.7547819, 99668057.5589731, -83588727.30468085, 44544405.00842795, -15862223.509903487
Part-1-1.5, -121108107.52289423, 6627157.773748831, 29697830.672798496, -12273215.883146526, 31684748.334634103, -13678246.288132884
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Part-1-1.9900, 114400967.59403895, 15000043.751947768, 30396040.241793424, 15684891.553211253, -1855780.1060383406, 129619278.61394323
** STEP: Step-1
**
*Step, name=Step-1, nlgeom=YES, inc=10000
*Coupled Temperature-displacement, creep=none, deltmx=1000.
0.1, 1., 1e-05, 1.
**
** LOADS
**
** Name: Load-1   Type: Surface heat flux
*Dsflux
Surf-1, S, 10086.
**
** OUTPUT REQUESTS
**
*Restart, write, frequency=0
**
** FIELD OUTPUT: F-Output-1
**
*Output, field, variable=PRESELECT
**
** HISTORY OUTPUT: H-Output-1
**
*Output, history, variable=PRESELECT
*End Step
